OPTI DIME 2 MODE PLAN DEFO;
TAB1 = LIRE 'UNV' 'trueone.unv' ;

SURFT = TAB1.'PhysicalSurface9';

GEO1 = TAB1.'PhysicalLine7';
GEO2 = TAB1.'PhysicalLine8';

MODYOUNG = 2.E11;
COEFPOIS = 0.3;
MODT = MODE SURFT MECANIQUE ELASTIQUE ISOTROPE;
MATT = MATE MODT YOUN MODYOUNG NU COEFPOIS;

CLT = BLOQ DEPLA ROTA GEO2;
FORT = FORCER FY (-1000.) GEO1;

RIGT = RIGI MODT MATT;
RIGT = RIGT ET CLT;

DEPL1 = RESO RIGT FORT;

*DEF0 = DEFO SURFT DEPL1 0. BLAN;
*DEF1 = DEFO SURFT DEPL1 BLEU;
*TRAC (DEF0 ET DEF1) CACH;


SS   = SIGM MODT MATT DEPL1;
SSVM = VMIS MODT SS;
*TRAC DEF1 MODT SSVM;

OPTI 'SORT' 'trueone';
SORT 'EXCE' (PROG (MAXI SSVM)) 'SEPA' 'ESPA';

FIN;
